Simulations: Version=160
  DataStore
  Experiment pd
    Memo README
      This experiment uses a fertiliser factor to simulate an N-rate trial. The graph shows the effect of the fertiliser applications on total soil nitrate level in each treatment.
    Factors
      Permutation
        Factor SowDate
          Specification=[SowingRule].Script.SowDate =01-jan, 08-jan, 15-jan, 22-jan, 29-jan, 05-feb, 12-feb, 19-feb, 26-feb, 05-mar, 12-mar, 19-mar, 26-mar, 02-apr, 09-apr, 16-apr, 23-apr, 30-apr
    Simulation Base_one
      Clock: Start=2019-01-01; End=2020-12-01
      Summary SummaryFile
      Weather: FileName=D:/project/wth_loc_4.met
      SoilArbitrator Soil Arbitrator
      Zone Field: Area=1; Slope=0; AspectAngle=0; Altitude=50
        Report: EventNames=[Potato].Harvesting
          VariableNames:
            [Clock].Today
            [Potato].Phenology.CurrentStageName
            [Potato].AboveGround.Wt
            [Potato].AboveGround.N
            [Potato].Tuber.Wt
            [Potato].Tuber.N
            [Potato].SowingDate
            Max of ([Potato].LAI) from [Potato].Sowing to [Potato].Harvesting
            [Potato].IsReadyForHarvesting
            Sum of [Weather].Rain from [Potato].Sowing to [Potato].Harvesting as InCropRainfall
            Sum of [Weather].Radn from [Potato].Sowing to [Potato].Harvesting as InCropRadn
            Mean of [Weather].MaxT from [Potato].Sowing to [Potato].Harvesting as InCropMaxTemperature
            Mean of [Weather].MinT from [Potato].Sowing to [Potato].Harvesting as InCropMinTemperature
            Sum of [Soil].SoilWater.Eo from [Potato].Sowing to [Potato].Harvesting as InCropET
            Sum of [Soil].SoilWater.Es from [Potato].Sowing to [Potato].Harvesting as InCropES
            sum([Soil].SoilWater.ESW) as TotalESW
        Fertiliser
        SurfaceOrganicMatter: InitialResidueName=wheat_stubble; InitialResidueType=wheat; InitialResidueMass=500; InitialStandingFraction=0; InitialCPR=0; InitialCNR=100
        Plant Potato
          Cultivar Early
            Command:
              [Structure].FinalLeafNumber.FixedValue = 28
              [Tuber].LiveFWt.DryMatterContent.XYPairs.Y = 0.11,0.22
              [Phenology].Vegetative.Target.FixedValue = 100
              [Structure].Phyllochron.Phyllochron.Phyllochron.XYPairs.Y = 10,10,15,25,25
              [Structure].Phyllochron.Phyllochron.Phyllochron.XYPairs.X = 0,0.45,0.85,0.85,1
              [Leaf].Photosynthesis.RUE.FixedValue = 2.8
          Cultivar Mid
            Command:
              [Structure].FinalLeafNumber.FixedValue = 35
              [Tuber].LiveFWt.DryMatterContent.XYPairs.Y = 0.15,0.22
              [Phenology].Vegetative.Target.FixedValue = 150
              [Structure].Phyllochron.Phyllochron.Phyllochron.XYPairs.Y = 10,20,20,40,40
              [Structure].Phyllochron.Phyllochron.Phyllochron.XYPairs.X = 0,0.10,0.65,0.75,1
              [Leaf].Photosynthesis.RUE.FixedValue = 2.8
          Cultivar Late
            Command:
              [Structure].FinalLeafNumber.FixedValue = 45
              [Tuber].LiveFWt.DryMatterContent.XYPairs.Y = 0.15,0.22
              [Phenology].Vegetative.Target.FixedValue = 100
              [Leaf].Photosynthesis.RUE.FixedValue = 2.9
        MicroClimate: a_interception=0; b_interception=1; c_interception=0; d_interception=0; SoilHeatFluxFraction=0.4; MinimumHeightDiffForNewLayer=0; NightInterceptionFraction=0.5; ReferenceHeight=2
        Manager Harvesting
          Crop = [Potato]
```csharp
using APSIM.Shared.Utilities;
using Models.Utilities;
using Models.Soils;
using Models.PMF;
using Models.Core;
using System;

namespace Models
{
    [Serializable] 
    public class Script : Model
    {
        [Description("Crop")]
        public IPlant Crop { get; set; }
        
        [EventSubscribe("DoManagement")]
        private void OnDoManagement(object sender, EventArgs e)
        {
            if (Crop.IsReadyForHarvesting)
            {
                Crop.Harvest();
                Crop.EndCrop();
            }
        }
    }
}
```
        Soil Synthetic Soil Derived from ISRIC SoilGrids: ASCOrder=NA; ASCSubOrder=NA; SoilType=Haplic Acrisols; Site=NA; NearestTown=NA; Region=NA; State=NA; Country=Burundi; NaturalVegetation=NA; ApsoilNumber=9999; Latitude=-2.875; Longitude=29.375; LocationAccuracy=+- 250 m; YearOfSampling=2019; DataSource=ISRIC SoilGrids
          Water: Thickness=[150, 150, 150, 150, 200, 200, 200, 200, 300, 300]; InitialPAWmm=0; RelativeTo=LL15; FilledFromTop=true
            InitialValues=[0.258, 0.245, 0.24, 0.24, 0.24, 0.24, 0.24, 0.24, 0.24, 0.24]
          Physical
            Thickness  ParticleSizeClay  ParticleSizeSand  ParticleSizeSilt  BD     AirDry  LL15   DUL    SAT    KS
            150        34.3              39.7              26                0.95   0.086   0.258  0.418  0.572  6.546
            150        35                39                26                1.042  0.082   0.245  0.393  0.54   6.059
            150        35.5              38.7              25.8              1.086  0.08    0.24   0.381  0.528  5.717
            150        36.5              38.2              25.2              1.112  0.08    0.24   0.376  0.522  5.091
            200        37                38.3              25                1.133  0.08    0.24   0.373  0.518  4.804
            200        37                38.8              25                1.147  0.08    0.24   0.373  0.512  4.804
            200        36.9              39                24.9              1.158  0.08    0.24   0.372  0.509  4.86
            200        36.7              39                24.7              1.163  0.08    0.24   0.37   0.507  4.974
            300        36.4              39                24.4              1.17   0.08    0.24   0.367  0.505  5.121
            300        36.1              39                24.1              1.179  0.08    0.24   0.364  0.501  5.302
            SoilCrop RiceSoil
              LL=[0.258, 0.245, 0.241, 0.251, 0.267, 0.284, 0.302, 0.318, 0.338, 0.359]
              KL=[0.06, 0.06, 0.06, 0.055, 0.048, 0.04, 0.032, 0.024, 0.014, 0.003]
              XF=[1, 1, 1, 1, 1, 1, 1, 1, 1, 1]
            SoilCrop WheatSoil
              LL=[0.258, 0.245, 0.241, 0.251, 0.267, 0.284, 0.302, 0.318, 0.338, 0.359]
              KL=[0.06, 0.06, 0.06, 0.055, 0.048, 0.04, 0.032, 0.024, 0.014, 0.003]
              XF=[1, 1, 1, 1, 1, 1, 1, 1, 1, 1]
            SoilCrop TeffSoil
              LL=[0.258, 0.245, 0.241, 0.251, 0.267, 0.284, 0.302, 0.318, 0.338, 0.359]
              KL=[0.06, 0.06, 0.06, 0.055, 0.048, 0.04, 0.032, 0.024, 0.014, 0.003]
              XF=[1, 1, 1, 1, 1, 1, 1, 1, 1, 1]
            SoilCrop SugarcaneSoil
              LL=[0.258, 0.245, 0.24, 0.247, 0.255, 0.266, 0.276, 0.285, 0.296, 0.309]
              KL=[0.06, 0.06, 0.06, 0.057, 0.053, 0.048, 0.044, 0.039, 0.033, 0.027]
              XF=[1, 1, 1, 1, 1, 1, 1, 1, 1, 1]
            SoilCrop MaizeSoil
              LL=[0.258, 0.245, 0.241, 0.251, 0.267, 0.284, 0.302, 0.318, 0.338, 0.359]
              KL=[0.06, 0.06, 0.06, 0.055, 0.048, 0.04, 0.032, 0.024, 0.014, 0.003]
              XF=[1, 1, 1, 1, 1, 1, 1, 1, 1, 1]
            SoilCrop SoybeanSoil
              LL=[0.258, 0.245, 0.241, 0.251, 0.267, 0.284, 0.302, 0.318, 0.338, 0.359]
              KL=[0.06, 0.06, 0.06, 0.055, 0.048, 0.04, 0.032, 0.024, 0.014, 0.003]
              XF=[1, 1, 1, 1, 1, 1, 1, 1, 1, 1]
            SoilCrop OilPalmSoil
              LL=[0.258, 0.245, 0.24, 0.247, 0.255, 0.266, 0.276, 0.285, 0.296, 0.309]
              KL=[0.06, 0.06, 0.06, 0.057, 0.053, 0.048, 0.044, 0.039, 0.033, 0.027]
              XF=[1, 1, 1, 1, 1, 1, 1, 1, 1, 1]
            SoilCrop CassavaSoil
              LL=[0.258, 0.245, 0.241, 0.251, 0.267, 0.284, 0.302, 0.318, 0.338, 0.359]
              KL=[0.06, 0.06, 0.06, 0.055, 0.048, 0.04, 0.032, 0.024, 0.014, 0.003]
              XF=[1, 1, 1, 1, 1, 1, 1, 1, 1, 1]
            SoilCrop PlantainForageSoil
              LL=[0.258, 0.245, 0.24, 0.247, 0.255, 0.266, 0.276, 0.285, 0.296, 0.309]
              KL=[0.06, 0.06, 0.06, 0.057, 0.053, 0.048, 0.044, 0.039, 0.033, 0.027]
              XF=[1, 1, 1, 1, 1, 1, 1, 1, 1, 1]
            SoilCrop SunflowerSoil
              LL=[0.259, 0.256, 0.263, 0.274, 0.287, 0.303, 0.318, 0.332, 0.349, 0.363]
              KL=[0.1, 0.093, 0.084, 0.075, 0.065, 0.053, 0.041, 0.029, 0.015, 0.001]
              XF=[1, 1, 1, 1, 1, 1, 1, 1, 1, 1]
            SoilCrop CanolaSoil
              LL=[0.258, 0.245, 0.241, 0.251, 0.267, 0.284, 0.302, 0.318, 0.338, 0.359]
              KL=[0.06, 0.06, 0.06, 0.055, 0.048, 0.04, 0.032, 0.024, 0.014, 0.003]
              XF=[1, 1, 1, 1, 1, 1, 1, 1, 1, 1]
            SoilCrop SorghumSoil
              LL=[0.258, 0.245, 0.241, 0.248, 0.26, 0.273, 0.286, 0.298, 0.313, 0.33]
              KL=[0.07, 0.07, 0.07, 0.066, 0.06, 0.053, 0.045, 0.039, 0.03, 0.019]
              XF=[1, 1, 1, 1, 1, 1, 1, 1, 1, 1]
            SoilCrop MilletSoil
              LL=[0.258, 0.245, 0.241, 0.248, 0.26, 0.273, 0.286, 0.298, 0.313, 0.33]
              KL=[0.07, 0.07, 0.07, 0.066, 0.06, 0.053, 0.045, 0.039, 0.03, 0.019]
              XF=[1, 1, 1, 1, 1, 1, 1, 1, 1, 1]
            SoilCrop PeanutSoil
              LL=[0.258, 0.245, 0.24, 0.24, 0.251, 0.273, 0.295, 0.316, 0.341, 0.363]
              KL=[0.06, 0.06, 0.06, 0.06, 0.055, 0.045, 0.035, 0.025, 0.012, 0.001]
              XF=[1, 1, 1, 1, 1, 1, 1, 1, 1, 1]
            SoilCrop BarleySoil
              LL=[0.258, 0.245, 0.241, 0.25, 0.264, 0.279, 0.294, 0.309, 0.326, 0.346]
              KL=[0.07, 0.07, 0.07, 0.065, 0.058, 0.049, 0.041, 0.033, 0.023, 0.01]
              XF=[1, 1, 1, 1, 1, 1, 1, 1, 1, 1]
            SoilCrop CottonSoil
              LL=[0.258, 0.245, 0.24, 0.24, 0.24, 0.247, 0.262, 0.276, 0.293, 0.313]
              KL=[0.1, 0.1, 0.1, 0.1, 0.1, 0.094, 0.083, 0.072, 0.058, 0.042]
              XF=[1, 1, 1, 1, 1, 1, 1, 1, 1, 1]
            SoilCrop OatsSoil
              LL=[0.258, 0.245, 0.241, 0.251, 0.267, 0.284, 0.302, 0.318, 0.338, 0.359]
              KL=[0.06, 0.06, 0.06, 0.055, 0.048, 0.04, 0.032, 0.024, 0.014, 0.003]
              XF=[1, 1, 1, 1, 1, 1, 1, 1, 1, 1]
            SoilCrop ChickpeaSoil
              LL=[0.258, 0.245, 0.24, 0.24, 0.25, 0.271, 0.291, 0.31, 0.333, 0.358]
              KL=[0.06, 0.06, 0.06, 0.06, 0.055, 0.046, 0.037, 0.028, 0.016, 0.003]
              XF=[1, 1, 1, 1, 1, 1, 1, 1, 1, 1]
            SoilCrop MungbeanSoil
              LL=[0.258, 0.245, 0.24, 0.245, 0.267, 0.293, 0.319, 0.344, 0.365, 0.364]
              KL=[0.06, 0.06, 0.06, 0.058, 0.048, 0.036, 0.024, 0.012, 0.001, 0]
              XF=[1, 1, 1, 1, 1, 1, 1, 1, 1, 0]
            SoilCrop Pigeon PeaSoil
              LL=[0.258, 0.245, 0.24, 0.24, 0.251, 0.273, 0.295, 0.316, 0.341, 0.363]
              KL=[0.06, 0.06, 0.06, 0.06, 0.055, 0.045, 0.035, 0.025, 0.012, 0.001]
              XF=[1, 1, 1, 1, 1, 1, 1, 1, 1, 1]
            SoilCrop CowpeaSoil
              LL=[0.258, 0.245, 0.241, 0.251, 0.267, 0.284, 0.302, 0.318, 0.338, 0.359]
              KL=[0.06, 0.06, 0.06, 0.055, 0.048, 0.04, 0.032, 0.024, 0.014, 0.003]
              XF=[1, 1, 1, 1, 1, 1, 1, 1, 1, 1]
            SoilCrop FababeanSoil
              LL=[0.258, 0.245, 0.24, 0.24, 0.242, 0.259, 0.278, 0.296, 0.317, 0.342]
              KL=[0.08, 0.08, 0.08, 0.08, 0.079, 0.069, 0.057, 0.046, 0.031, 0.014]
              XF=[1, 1, 1, 1, 1, 1, 1, 1, 1, 1]
            SoilCrop LucerneSoil
              LL=[0.258, 0.245, 0.24, 0.24, 0.24, 0.24, 0.24, 0.241, 0.254, 0.271]
              KL=[0.1, 0.1, 0.1, 0.1, 0.1, 0.1, 0.1, 0.099, 0.089, 0.075]
              XF=[1, 1, 1, 1, 1, 1, 1, 1, 1, 1]
            SoilCrop LupinSoil
              LL=[0.258, 0.245, 0.241, 0.251, 0.267, 0.284, 0.302, 0.318, 0.338, 0.359]
              KL=[0.06, 0.06, 0.06, 0.055, 0.048, 0.04, 0.032, 0.024, 0.014, 0.003]
              XF=[1, 1, 1, 1, 1, 1, 1, 1, 1, 1]
            SoilCrop LentilSoil
              LL=[0.258, 0.245, 0.241, 0.251, 0.267, 0.284, 0.302, 0.318, 0.338, 0.359]
              KL=[0.06, 0.06, 0.06, 0.055, 0.048, 0.04, 0.032, 0.024, 0.014, 0.003]
              XF=[1, 1, 1, 1, 1, 1, 1, 1, 1, 1]
            SoilCrop TriticaleSoil
              LL=[0.258, 0.245, 0.25, 0.268, 0.289, 0.313, 0.336, 0.358, 0.367, 0.364]
              KL=[0.07, 0.07, 0.065, 0.056, 0.045, 0.032, 0.019, 0.006, 0, 0]
              XF=[1, 1, 1, 1, 1, 1, 1, 1, 0, 0]
            SoilCrop EucalyptusSoil
              LL=[0.258, 0.245, 0.24, 0.241, 0.242, 0.243, 0.245, 0.246, 0.247, 0.249]
              KL=[0.08, 0.08, 0.08, 0.079, 0.079, 0.078, 0.077, 0.076, 0.075, 0.074]
              XF=[1, 1, 1, 1, 1, 1, 1, 1, 1, 1]
            SoilCrop GliricidiaSoil
              LL=[0.258, 0.245, 0.24, 0.242, 0.244, 0.247, 0.25, 0.252, 0.255, 0.259]
              KL=[0.08, 0.08, 0.08, 0.079, 0.077, 0.076, 0.074, 0.072, 0.07, 0.068]
              XF=[1, 1, 1, 1, 1, 1, 1, 1, 1, 1]
            SoilCrop PotatoSoil
              LL=[0.258, 0.245, 0.24, 0.242, 0.244, 0.247, 0.25, 0.252, 0.255, 0.259]
              KL=[0.08, 0.08, 0.08, 0.079, 0.077, 0.076, 0.074, 0.072, 0.07, 0.068]
              XF=[1, 1, 1, 1, 1, 1, 1, 1, 1, 1]
          WaterBalance SoilWater: SummerDate=1-nov; SummerU=6; SummerCona=6; WinterDate=1-apr; WinterU=4; WinterCona=2.5; DiffusConst=1726.59; DiffusSlope=6.43; Salb=0.13; CN2Bare=73; CNRed=20; CNCov=0; DischargeWidth=5; CatchmentArea=10; PSIDul=-100; Thickness=[150, 150, 150, 150, 200, 200, 200, 200, 300, 300]
            SWCON=[0.194, 0.191, 0.184, 0.171, 0.132, 0.136, 0.139, 0.141, 0.104, 0.107]
          Organic: FOMCNRatio=40; CarbonUnits=Total
            Thickness  Carbon  SoilCNRatio  FBiom  FInert  FOM
            150        6.863   11           0.04   0.485   72.7728
            150        4.415   11           0.031  0.688   58.1103
            150        3.522   11           0.014  0.827   46.402
            150        3.143   11           0.01   0.905   37.0527
            200        2.854   11           0.01   0.979   27.4493
            200        2.647   11           0.01   0.99    20.335
            200        2.529   11           0.01   0.99    15.0645
            200        2.496   11           0.01   0.99    11.1601
            300        2.456   11           0.01   0.99    7.11597
            300        2.408   11           0.01   0.99    4.53735
          Chemical: Thickness=[150, 150, 150, 150, 200, 200, 200, 200, 300, 300]; PH=[5.1, 5.1, 5.12, 5.18, 5.2, 5.2, 5.2, 5.2, 5.2, 5.2]; PHUnits=Water
          Nutrient
          CERESSoilTemperature
          Solute NO3: Thickness=[150, 150, 150, 150, 200, 200, 200, 200, 300, 300]; InitialValues=[1, 1, 1, 1, 1, 1, 1, 1, 1, 1]; InitialValuesUnits=ppm; WaterTableConcentration=0; D0=0; DepthConstant=0; MaxDepthSoluteAccessible=0; RunoffEffectivenessAtMovingSolute=0; MaxEffectiveRunoff=0
          Solute NH4: Thickness=[150, 150, 150, 150, 200, 200, 200, 200, 300, 300]; InitialValues=[0.1, 0.1, 0.1, 0.1, 0.1, 0.1, 0.1, 0.1, 0.1, 0.1]; InitialValuesUnits=ppm; WaterTableConcentration=0; D0=0; DepthConstant=0; MaxDepthSoluteAccessible=0; RunoffEffectivenessAtMovingSolute=0; MaxEffectiveRunoff=0
          Solute Urea: Thickness=[150, 150, 150, 150, 200, 200, 200, 200, 300, 300]; InitialValues=[0, 0, 0, 0, 0, 0, 0, 0, 0, 0]; InitialValuesUnits=ppm; WaterTableConcentration=0; D0=0; DepthConstant=0; MaxDepthSoluteAccessible=0; RunoffEffectivenessAtMovingSolute=0; MaxEffectiveRunoff=0
        Manager SowingRule
          Crop = [Potato]
          SowDate = 24-Jul
          CultivarName = Karaka
          SowingDepth = 120
          RowSpacing = 800
          Population = 4.2
```csharp
using APSIM.Shared.Utilities;
using Models.Utilities;
using Models.Soils;
using Models.PMF;
using Models.Core;
using System;

namespace Models
{
    [Serializable]
    public class Script : Model
    {
        [Link] Clock Clock;
        [Link] Fertiliser Fertiliser;
        [Link] Summary Summary;
        [Link] Soil Soil;
        
        [Description("Crop")]
        public IPlant Crop { get; set; }

        [Description("Sowing date (d-mmm)")]
        public string SowDate { get; set; }

        [Display(Type = DisplayType.CultivarName)]
        [Description("Cultivar to be sown")]
        public string CultivarName { get; set; }

        [Description("Sowing depth (mm)")]
        public double SowingDepth { get; set; }

        [Description("Row spacing (mm)")]
        public double RowSpacing { get; set; }

        [Description("Plant population (/m2)")]
        public double Population { get; set; }

        [EventSubscribe("DoManagement")]
        private void OnDoManagement(object sender, EventArgs e)
        {
            if (DateUtilities.WithinDates(SowDate, Clock.Today, SowDate))
            {
                Crop.Sow(population: Population, cultivar: CultivarName, depth: SowingDepth, rowSpacing: RowSpacing);    
            }
        }
    }
}
```
        Manager Fertilise topup
          FertiliserType = Urea
          Threshold = 100
```csharp
using Models.Soils;
using APSIM.Shared.Utilities;
using Models.Soils.Nutrients;
using Models.PMF;
using Models.Core;
using System;
using System.Linq;
using Models.Soils.Nutrients;
namespace Models
{
    [Serializable]
    public class Script : Model
    {
        [Link] Clock Clock;
        [Link] Fertiliser Fertiliser;
        [Link(ByName=true)] Solute NO3;

        [Description("Type of fertiliser to apply? ")] 
        public Fertiliser.Types FertiliserType { get; set; }
    
        [Description("Threshold amount of NO3 to topup to (kg/ha)")]
        public double Threshold { get; set;}
        
        [EventSubscribe("DoManagement")]
        private void OnDoManagement(object sender, EventArgs e)
        {
            double Amount = Threshold - MathUtilities.Sum(NO3.kgha);
            Fertiliser.Apply(Amount: Amount, Type: FertiliserType);
        }
    }
}
```
        Manager Reset on sowing
          ResetWater = Yes
          ResetNutrients = Yes
          ResetSOM = Yes
```csharp
using Models.Soils.Nutrients;
using APSIM.Shared.Utilities;
using Models.Surface;
using Models.Utilities;
using Models.Soils.Nutrients;
using Models.Soils;
using Models.PMF;
using Models.Core;
using System;
using Models.Interfaces;

namespace Models
{
    [Serializable]
    public class Script : Model
    {
        [Link] private Plant Wheat;
        [Link] private ISoilWater SoilWater;
        [Link] private Nutrient nutrient;
        [Link] private SurfaceOrganicMatter SOM;
        [Link] private Summary Summary;

        [Description("Reset Water? (Yes or No)")]
        public string ResetWater {get;set;}

        [Description("Reset Soil Nutrients? (Yes or No)")]
        public string ResetNutrients {get;set;}

        [Description("Reset Surface Organic Matter? (Yes or No)")]
        public string ResetSOM {get;set;}

        [EventSubscribe("Sowing")]
        private void OnSowing(object sender, EventArgs e)
        {
            if (ResetWater == "Yes")
            {
                Summary.WriteMessage(this, "Reset Water", MessageType.Diagnostic);
                SoilWater.Reset();
            }
            if (ResetNutrients == "Yes")
            {
                Summary.WriteMessage(this, "Reset Nutrients", MessageType.Diagnostic);
                nutrient.Reset();
            }
            if (ResetSOM == "Yes")
            {
                Summary.WriteMessage(this, "Reset Surface OM", MessageType.Diagnostic);
                SOM.Reset();
            }
        }
    }
}
```
        Manager Fertilise at sowing
          Crop = [Potato]
          FertiliserType = DAP
          Amount = 300
```csharp
using Models.Soils;
using System;
using Models.Core;
using Models.PMF;
namespace Models
{
    [Serializable]
    public class Script : Model
    {
        [Link] Clock Clock;
        [Link] Fertiliser Fertiliser;
        
        [Description("Crop to be fertilised")]
        public IPlant Crop { get; set; }

        [Description("Type of fertiliser to apply? ")] 
        public Fertiliser.Types FertiliserType { get; set; }
    
        [Description("Amount of fertiliser to be applied (kg/ha)")]
        public double Amount { get; set; }
        
        [EventSubscribe("Sowing")]
        private void OnSowing(object sender, EventArgs e)
        {
            Model crop = sender as Model;
            if (Crop != null && crop.Name.ToLower() == (Crop as IModel).Name.ToLower())
                Fertiliser.Apply(Amount: Amount, Type: FertiliserType);
        }
    }
}
```
    Simulation Base_two
      Clock: Start=2019-01-01; End=2020-12-01
      Summary SummaryFile
      Weather: FileName=D:/project/wth_loc_4.met
      SoilArbitrator Soil Arbitrator
      Zone Field: Area=1; Slope=0; AspectAngle=0; Altitude=50
        Report: EventNames=[Potato].Harvesting
          VariableNames:
            [Clock].Today
            [Potato].Phenology.CurrentStageName
            [Potato].AboveGround.Wt
            [Potato].AboveGround.N
            [Potato].Tuber.Wt
            [Potato].Tuber.N
            [Potato].SowingDate
        Fertiliser
        SurfaceOrganicMatter: InitialResidueName=wheat_stubble; InitialResidueType=wheat; InitialResidueMass=500; InitialStandingFraction=0; InitialCPR=0; InitialCNR=100
        Soil Synthetic Soil Derived from ISRIC SoilGrids: ASCOrder=NA; ASCSubOrder=NA; SoilType=Haplic Acrisols; Site=NA; NearestTown=NA; Region=NA; State=NA; Country=Burundi; NaturalVegetation=NA; ApsoilNumber=9999; Latitude=-2.875; Longitude=29.375; LocationAccuracy=+- 250 m; YearOfSampling=2019; DataSource=ISRIC SoilGrids
          Water: Thickness=[150, 150, 150, 150, 200, 200, 200, 200, 300, 300]; InitialPAWmm=0; RelativeTo=LL15; FilledFromTop=true
            InitialValues=[0.258, 0.245, 0.24, 0.24, 0.24, 0.24, 0.24, 0.24, 0.24, 0.24]
          Physical: same as pd.Base_one.Field.Synthetic Soil Derived from ISRIC SoilGrids.Physical
          WaterBalance SoilWater: same as pd.Base_one.Field.Synthetic Soil Derived from ISRIC SoilGrids.SoilWater
          Organic: FOMCNRatio=40; CarbonUnits=Total
            Thickness  Carbon  SoilCNRatio  FBiom  FInert  FOM
            150        6.863   11           0.04   0.485   72.7728
            150        4.415   11           0.031  0.688   58.1103
            150        3.522   11           0.014  0.827   46.402
            150        3.143   11           0.01   0.905   37.0527
            200        2.854   11           0.01   0.979   27.4493
            200        2.647   11           0.01   0.99    20.335
            200        2.529   11           0.01   0.99    15.0645
            200        2.496   11           0.01   0.99    11.1601
            300        2.456   11           0.01   0.99    7.11597
            300        2.408   11           0.01   0.99    4.53735
          Chemical: Thickness=[150, 150, 150, 150, 200, 200, 200, 200, 300, 300]; PH=[5.1, 5.1, 5.12, 5.18, 5.2, 5.2, 5.2, 5.2, 5.2, 5.2]; PHUnits=Water
          Nutrient
          CERESSoilTemperature
          Solute NO3: same as pd.Base_one.Field.Synthetic Soil Derived from ISRIC SoilGrids.NO3
          Solute NH4: same as pd.Base_one.Field.Synthetic Soil Derived from ISRIC SoilGrids.NH4
          Solute Urea: same as pd.Base_one.Field.Synthetic Soil Derived from ISRIC SoilGrids.Urea
        Plant Potato
        MicroClimate: a_interception=0; b_interception=1; c_interception=0; d_interception=0; SoilHeatFluxFraction=0.4; MinimumHeightDiffForNewLayer=0; NightInterceptionFraction=0.5; ReferenceHeight=2
        Manager Harvesting: same as pd.Base_one.Field.Harvesting
        Manager FertiliserRule
          ApplicationAmount = 500
          FertType = NO3N
          ApplicationDate = 12/30/2019 00:00:00
```csharp
using Models.Soils;
using System;
using Models.Core;
using Models.PMF;

namespace Models
{
    [Serializable]
    public class Script : Model
    {
        [Link]
        private Fertiliser fertiliser;

           [Link]
           private Clock clock;

        [Description("Amount (kg/ha) of fertiliser to apply")]
        public double ApplicationAmount {get; set;}

        [Description("Type of fertiliser to apply")]
        public Fertiliser.Types FertType { get; set; }

        [Description("Date of fertiliser application")]
        public DateTime ApplicationDate {get; set;}

        [EventSubscribe("DoManagement")]
        private void OnDoManagement(object sender, EventArgs e)
        {
            if (clock.Today.Date.Equals(ApplicationDate))
                fertiliser.Apply(Amount:ApplicationAmount,Type:FertType);
        }
    }
}
```
        Manager SowingRule
          Crop = [Potato]
          SowDate = 24-Jul
          CultivarName = Karaka
          SowingDepth = 50
          RowSpacing = 750
          Population = 5.3
          script: same as in pd.Base_one.Field.SowingRule
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